λ := 2
u := 1
p0 := 0
p1 := 0
p2 := 0
p3 := 0
p4 := 0
p5 := 0
p6 := 0
P7 := 0
P8 := 0
Given
p0*λ == p1*u
(λ + u)*p1 == p2*u + p0*λ
(λ + u)*p2 == p3*u + p1*λ
(λ + u)*p3 == p4*u + p2*λ
u*p4 == p3*λ
p0 + p1 + p2 + p3 + p4 == 1
Find(p0, p1, p2, p3, p4) = [0.0322581; 0.0645161; 0.129032; 0.258065; 0.516129]
Given
p0*λ == p1*u
(λ + u)*p1 == p2*2*u + p0*λ
(λ + 2*u)*p2 == p3*2*u + p1*λ
(λ + 2*u)*p3 == p4*2*u + p2*λ
(λ + 2*u)*p4 == p5*2*u + p3*λ
2*u*p5 == p4*λ
p0 + p1 + p2 + p3 + p4 + p5 == 1
Find(p0, p1, p2, p3, p4, p5) = [0.0909091; 0.181818; 0.181818; 0.181818; 0.181818; 0.181818]
Given
p0*λ == p1*u
(λ + u)*p1 == p2*2*u + p0*λ
(λ + 2*u)*p2 == p3*3*u + p1*λ
(λ + 3*u)*p3 == p4*3*u + p2*λ
(λ + 3*u)*p4 == p5*3*u + p3*λ
(λ + 3*u)*p5 == p6*3*u + p4*λ
3*u*p6 == p5*λ
p0 + p1 + p2 + p3 + p4 + p5 + p6 == 1
Find(p0, p1, p2, p3, p4, p5, p6) = [0.121805; 0.243609; 0.243609; 0.162406; 0.108271; 0.0721805; 0.0481203]
